<?xml version="1.0"?>
<flight_control name="FCS: Scarab VTOL Auto Level">
  <property value="0.0">fcs/inputThrottle_nd</property>

  <!-- Roll Auto Level -->
  <property value="0.0">fcs/refRoll_rad</property>
  <property value="1.0">fcs/AutoLevelRoll</property>
  <property>fcs/refRoll_rps</property>
  <property>fcs/errRoll_rps</property>
  <property>fcs/errRoll_rad</property>
  <property>fcs/refRoll_rps_from_angle_error</property>

  <!-- Pitch Auto Level -->
  <property value="0.0">fcs/refPitch_rad</property>
  <property value="1.0">fcs/AutoLevelPitch</property>
  <property>fcs/refPitch_rps</property>
  <property>fcs/errPitch_rps</property>
  <property>fcs/errPitch_rad</property>
  <property>fcs/refPitch_rps_from_angle_error</property>

  <!-- Yaw Auto Level -->
  <property value="0.0">fcs/refYaw_rad</property>
  <property value="1.0">fcs/AutoLevelYaw</property>
  <property>fcs/errYaw_rps</property>
  <property>fcs/cmdYaw_rps</property>

  <!-- Brake Control -->
  <property>fcs/left-brake-input-norm</property>
  <property>fcs/right-brake-input-norm</property>

    <channel name="Speedbrake">
        <!-- Speedbrake mechanization: the single source of the speedbrake POSITION, shared by the
             model and the game's animation stream.
             fcs/speedbrake-cmd-norm is an instant 0/1 request (the game sets it with SetDsbCmd),
             and a real speedbrake cannot snap to it, so this kinematic block drives
             fcs/speedbrake-pos-norm from 0 to 1 over 0.6 s - and back over the same traverse.
             In THIS mode the mechanized value is consumed by the game only:
             FSpeedbrakeController::OnPostSimulationTick publishes AnimationState.SpeedbrakeAnim
             (GetDsbPos(ofNorm)) and USpeedbrakeControlChannel republishes it as
             AnimationInput.Speedbrake (range 0..1, neutral 0); scarabVTOL/Aero.xml does not read
             the speedbrake (in VTOL the aircraft is steered by differential thrust).
             Do NOT add smoothing on the animation side: the travel time is set HERE only.
             The traverse times are the single place to tune speedbrake travel speed. -->
        <kinematic name="Speedbrake Control">
            <input>fcs/speedbrake-cmd-norm</input>
            <traverse>
                <setting>
                    <position> 0.0 </position>
                    <time> 0.0 </time>
                </setting>
                <setting>
                    <position> 1.0 </position>
                    <time> 0.6 </time>
                </setting>
            </traverse>
            <output>fcs/speedbrake-pos-norm</output>
            </kinematic>
    </channel>

   <channel name="Wheel Brakes">
        <kinematic name="Left Brake Control">
            <input>fcs/left-brake-input-norm</input>
            <traverse>
                <setting>
                    <position> 0.0 </position>
                    <time> 0.0 </time>
                </setting>
                <setting>
                    <position> 1.0 </position>
                    <time> 5.5 </time>
                </setting>
            </traverse>
            <output>fcs/left-brake-cmd-norm</output>
        </kinematic>

        <kinematic name="Right Brake Control">
            <input>fcs/right-brake-input-norm</input>
            <traverse>
                <setting>
                    <position> 0.0 </position>
                    <time> 0.0 </time>
                </setting>
                <setting>
                    <position> 1.0 </position>
                    <time> 5.5 </time>
                </setting>
            </traverse>
            <output>fcs/right-brake-cmd-norm</output>
        </kinematic>
    </channel>
  <!-- End Brake Control -->

  <channel name="OuterLoop-Angles">
    <summer name="roll_angle_error_summer">
      <input>fcs/refRoll_rad</input>
      <input>-attitude/phi-rad</input>
      <output>fcs/errRoll_rad</output>
    </summer>
    <pid name="roll_angle_to_rate_pid">
      <input>fcs/errRoll_rad</input>
      <kp>1.2</kp>
      <output>fcs/refRoll_rps_from_angle_error</output>
    </pid>

    <summer name="pitch_angle_error_summer">
      <input>fcs/refPitch_rad</input>
      <input>-attitude/pitch-rad</input>
      <output>fcs/errPitch_rad</output>
    </summer>

    <pid name="pitch_angle_to_rate_pid">
      <input>fcs/errPitch_rad</input>
      <kp>1.2</kp>
      <output>fcs/refPitch_rps_from_angle_error</output>
    </pid>

  </channel>

  <channel name="InnerLoop-Rates">

    <summer name="roll_error_summer">
      <input>fcs/refRoll_rps_from_angle_error</input>
      <input>-velocities/pi-rad_sec</input>
      <output>fcs/errRoll_rps</output>
    </summer>

    <pure_gain>
      <input>fcs/errRoll_rps</input>
      <gain>fcs/AutoLevelRoll</gain>
      <output>fcs/errRoll_rps</output>
    </pure_gain>

    <pid name="roll_rate_pid">
      <input>fcs/errRoll_rps</input>
      <kp>1.3</kp>
      <ki>0.0</ki>
      <kd>0.0</kd>
      <output>fcs/cmdRoll_rps</output>
    </pid>

    <summer name="pitch_error_summer">
      <input>fcs/refPitch_rps_from_angle_error</input>
      <input>-velocities/qi-rad_sec</input>
      <output>fcs/errPitch_rps</output>
    </summer>

    <pure_gain>
      <input>fcs/errPitch_rps</input>
      <gain>fcs/AutoLevelPitch</gain>
      <output>fcs/errPitch_rps</output>
    </pure_gain>

    <pid name="pitch_rate_pid">
      <input>fcs/errPitch_rps</input>
      <kp>1.3</kp>
      <ki>0.0</ki>
      <kd>0.0</kd>
      <output>fcs/cmdPitch_rps</output>
    </pid>

    <summer name="yaw_error_summer">
      <input>fcs/refYaw_rad</input>
      <input>-velocities/r-rad_sec</input>
      <output>fcs/errYaw_rps</output>
    </summer>

    <pure_gain>
      <input>fcs/errYaw_rps</input>
      <gain>fcs/AutoLevelYaw</gain>
      <output>fcs/errYaw_rps</output>
    </pure_gain>

    <pid name="yaw_rate_pid">
      <input>fcs/errYaw_rps</input>
      <kp>1.3</kp>
      <ki>0.0</ki>
      <kd>0.0</kd>
      <output>fcs/cmdYaw_rps</output>
    </pid>

  </channel>

  <channel name="Control_Mixer">

    <summer name="Mixer_Engine_FR">
      <input>fcs/inputThrottle_nd</input>
      <input>-fcs/cmdRoll_rps</input>
      <output>fcs/cmd_engine_FR_nd</output>
    </summer>

    <summer name="Mixer_Engine_LR">
      <input>fcs/inputThrottle_nd</input>
      <input>fcs/cmdRoll_rps</input>
      <output>fcs/cmd_engine_LR_nd</output>
    </summer>

    <summer name="Mixer_Pitch_Up">
      <input>fcs/cmdPitch_rps</input>
      <output>fcs/cmd_stab_up_nd</output>
    </summer>

    <summer name="Mixer_Pitch_Down">
      <input>-fcs/cmdPitch_rps</input>
      <output>fcs/cmd_stab_down_nd</output>
    </summer>

    <summer name="Mixer_Yaw_Right">
      <input>fcs/cmdYaw_rps</input>
      <output>fcs/cmd_stab_yaw_right_nd</output>
    </summer>

    <summer name="Mixer_Yaw_Left">
      <input>-fcs/cmdYaw_rps</input>
      <output>fcs/cmd_stab_yaw_left_nd</output>
    </summer>
  </channel>

</flight_control>
